Sat 08/07/2021
01:44 AM
;Model Desc: NO MODEL DESCRIPTION
;Project Name: example2_3
;Project ID: NO PROJECT DESCRIPTION

$PROBLEM WARFARIN
$INPUT ID TIME AMT RATE EVID MDV DV TSTRAT TMIN TMAX
$DATA warfarin.csv ignore=C

$SUBROUTINES ADVAN2 TRANS2

$THETA
CL=0.15 ;[CL]
V=8.0  ;[V]
KA=1.0  ;[KA]

$OMEGA
ECL=(0.07) ;[P]
EV=(0.02) ;[P]
EKA=(0.6)  ;[P]

$SIGMA
;RCV=residual %CV/100 (proportionate error)
RCV=0.01           ;[P]
;RSTD=residual standard error (additive error)
RSTD=(0.001 FIXED) ;[A]

$PK
MU_ECL=LOG(THETA(CL))
MU_EV=LOG(THETA(V))
MU_EKA=LOG(THETA(KA))
CL=EXP(MU_ECL+ETA(ECL))
V=EXP(MU_EV+ETA(EV))
KA=EXP(MU_EKA+ETA(EKA))
S2=V
F1=1.0

$ERROR
IPRED=A(2)/V
Y=IPRED + IPRED*EPS(RCV) + EPS(RSTD)

$DESIGN GROUPSIZE=32 FIMDIAG=1 MAXEVAL=9999 PRINT=20
        DESEL=TIME DESELSTRAT=TSTRAT DESELMIN=TMIN DESELMAX=TMAX

$TABLE ID TIME TSTRAT TMIN TMAX EVID MDV IPRED NOAPPEND NOPRINT FILE=warfarin2.tab

NM-TRAN MESSAGES
 WARNINGS AND ERRORS (IF ANY) FOR PROBLEM    1
 (WARNING  2) NM-TRAN INFERS THAT THE DATA ARE POPULATION.

1NONLINEAR MIXED EFFECTS MODEL PROGRAM (NONMEM) VERSION 7.5.0
 ORIGINALLY DEVELOPED BY STUART BEAL, LEWIS SHEINER, AND ALISON BOECKMANN
 CURRENT DEVELOPERS ARE ROBERT BAUER, ICON DEVELOPMENT SOLUTIONS,
 AND ALISON BOECKMANN. IMPLEMENTATION, EFFICIENCY, AND STANDARDIZATION
 PERFORMED BY NOUS INFOSYSTEMS.
 PROBLEM NO.:         1
 WARFARIN
 TOT. NO. OF OBS RECS:        3
 TOT. NO. OF INDIVIDUALS:        1
 ONE COMPARTMENT MODEL WITH FIRST-ORDER ABSORPTION (ADVAN2)
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 #TBLN:      1
 #METH: First Order: D-OPTIMALITY
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
 #TERM:
 NO. OF FUNCTION EVALUATIONS USED:      112
0MINIMIZATION SUCCESSFUL

 ETABAR IS THE ARITHMETIC MEAN OF THE ETA-ESTIMATES,
 AND THE P-VALUE IS GIVEN FOR THE NULL HYPOTHESIS THAT THE TRUE MEAN IS 0.

 ETABAR:         0.0000E+00  0.0000E+00  0.0000E+00
 SE:             0.0000E+00  0.0000E+00  0.0000E+00
 N:                       1           1           1

 P VAL.:         1.0000E+00  1.0000E+00  1.0000E+00

 ETASHRINKSD(%)  1.0000E+02  1.0000E+02  1.0000E+02
 ETASHRINKVR(%)  1.0000E+02  1.0000E+02  1.0000E+02
 EBVSHRINKSD(%)  3.9366E+00  2.1746E+01  8.7273E+00
 EBVSHRINKVR(%)  7.7182E+00  3.8763E+01  1.6693E+01
 RELATIVEINF(%)  8.7713E+01  5.4828E+01  7.6835E+01
 EPSSHRINKSD(%)  1.0000E+02  1.0000E+02
 EPSSHRINKVR(%)  1.0000E+02  1.0000E+02


 #TERE:
 Elapsed opt. design time in seconds:     0.03
 Elapsed postprocess time in seconds:     0.00

 ********************                            FIRST ORDER: D-OPTIMALITY                           ********************
 #OBJT:**************                MINIMUM VALUE OF OBJECTIVE FUNCTION: D-OPTIMALITY               ********************
 #OBJV:********************************************      -47.533       **************************************************

 ********************                            FIRST ORDER: D-OPTIMALITY                           ********************
 ********************                             FINAL PARAMETER ESTIMATE                           ********************

 THETA - VECTOR OF FIXED EFFECTS PARAMETERS   *********
            THETA(CL) THETA(V)  THETA(KA)
            1.50E-01  8.00E+00  1.00E+00

 OMEGA - COV MATRIX FOR RANDOM EFFECTS - ETAS  ********
            ETA(ECL)  ETA(EV)   ETA(EKA)
 ETA(ECL)
+           7.00E-02
 ETA(EV)
+           0.00E+00  2.00E-02
 ETA(EKA)
+           0.00E+00  0.00E+00  6.00E-01

 SIGMA - COV MATRIX FOR RANDOM EFFECTS - EPSILONS  ****
            EPS(RCV)  EPS(RSTD)
 EPS(RCV)
+           1.00E-02
 EPS(RSTD)
+           0.00E+00  1.00E-03

 OMEGA - CORR MATRIX FOR RANDOM EFFECTS - ETAS  *******
            ETA(ECL)  ETA(EV)   ETA(EKA)
 ETA(ECL)
+           2.65E-01
 ETA(EV)
+           0.00E+00  1.41E-01
 ETA(EKA)
+           0.00E+00  0.00E+00  7.75E-01

 SIGMA - CORR MATRIX FOR RANDOM EFFECTS - EPSILONS  ***
            EPS(RCV)  EPS(RSTD)
 EPS(RCV)
+           1.00E-01
 EPS(RSTD)
+           0.00E+00  3.16E-02

 ********************                            FIRST ORDER: D-OPTIMALITY                           ********************
 ********************                            STANDARD ERROR OF ESTIMATE                          ********************

 THETA - VECTOR OF FIXED EFFECTS PARAMETERS   *********
            THETA(CL) THETA(V)  THETA(KA)
            7.50E-03  2.71E-01  1.57E-01

 OMEGA - COV MATRIX FOR RANDOM EFFECTS - ETAS  ********
            ETA(ECL)  ETA(EV)   ETA(EKA)
 ETA(ECL)
+           1.90E-02
 ETA(EV)
+          .........  9.91E-03
 ETA(EKA)
+          ......... .........  1.86E-01

 SIGMA - COV MATRIX FOR RANDOM EFFECTS - EPSILONS  ****
            EPS(RCV)  EPS(RSTD)
 EPS(RCV)
+           5.66E-03
 EPS(RSTD)
+          ......... .........

 OMEGA - CORR MATRIX FOR RANDOM EFFECTS - ETAS  *******
            ETA(ECL)  ETA(EV)   ETA(EKA)
 ETA(ECL)
+           3.60E-02
 ETA(EV)
+          .........  3.50E-02
 ETA(EKA)
+          ......... .........  1.20E-01

 SIGMA - CORR MATRIX FOR RANDOM EFFECTS - EPSILONS  ***
            EPS(RCV)  EPS(RSTD)
 EPS(RCV)
+           2.83E-02
 EPS(RSTD)
+          ......... .........

 ********************                            FIRST ORDER: D-OPTIMALITY                           ********************
 ********************                          COVARIANCE MATRIX OF ESTIMATE                         ********************

     TH 1 | TH 1      TH 2 | TH 1      TH 2 | TH 2      TH 3 | TH 1      TH 3 | TH 2      TH 3 | TH 3    OM11 | TH 1
     5.62E-05         4.35E-04         7.36E-02         1.50E-04         1.16E-02         2.45E-02         0.00E+00
   OM11 | TH 2      OM11 | TH 3      OM11 | OM11      OM22 | TH 1      OM22 | TH 2      OM22 | TH 3      OM22 | OM11
     0.00E+00         0.00E+00         3.62E-04         0.00E+00         0.00E+00         0.00E+00         8.13E-07
   OM22 | OM22      OM33 | TH 1      OM33 | TH 2      OM33 | TH 3      OM33 | OM11      OM33 | OM22      OM33 | OM33
     9.81E-05         0.00E+00         0.00E+00         0.00E+00         3.84E-05         1.41E-04         3.46E-02
   SG11 | TH 1      SG11 | TH 2      SG11 | TH 3      SG11 | OM11      SG11 | OM22      SG11 | OM33      SG11 | SG11
     0.00E+00         0.00E+00         0.00E+00        -6.46E-06        -3.12E-05        -2.43E-04         3.20E-05

 ********************                            FIRST ORDER: D-OPTIMALITY                           ********************
 ********************                          CORRELATION MATRIX OF ESTIMATE                        ********************

     TH 1 | TH 1      TH 2 | TH 1      TH 2 | TH 2      TH 3 | TH 1      TH 3 | TH 2      TH 3 | TH 3    OM11 | TH 1
     7.50E-03         2.14E-01         2.71E-01         1.27E-01         2.73E-01         1.57E-01         0.00E+00
   OM11 | TH 2      OM11 | TH 3      OM11 | OM11      OM22 | TH 1      OM22 | TH 2      OM22 | TH 3      OM22 | OM11
     0.00E+00         0.00E+00         1.90E-02         0.00E+00         0.00E+00         0.00E+00         4.31E-03
   OM22 | OM22      OM33 | TH 1      OM33 | TH 2      OM33 | TH 3      OM33 | OM11      OM33 | OM22      OM33 | OM33
     9.91E-03         0.00E+00         0.00E+00         0.00E+00         1.09E-02         7.64E-02         1.86E-01
   SG11 | TH 1      SG11 | TH 2      SG11 | TH 3      SG11 | OM11      SG11 | OM22      SG11 | OM33      SG11 | SG11
     0.00E+00         0.00E+00         0.00E+00        -6.00E-02        -5.56E-01        -2.31E-01         5.66E-03
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 Elapsed finaloutput time in seconds:     0.02
 #CPUT: Total CPU Time in Seconds,        0.078
