Mon 03/22/2021
10:30 PM
$PROBLEM WARFARIN
$INPUT ID TIME AMT RATE EVID MDV DV TSTRAT TMIN TMAX
$DATA warfarin2c.csv ignore=C

$SUBROUTINES ADVAN2 TRANS2

$PK
MU_1=LOG(THETA(1))
MU_2=LOG(THETA(2))
MU_3=LOG(THETA(3))
CL=EXP(MU_1+ETA(1))
V=EXP(MU_2+ETA(2))
KA=EXP(MU_3+ETA(3))
S2=V
F1=1.0

$ERROR
IPRED=A(2)/V
Y=IPRED + IPRED*EPS(1) + EPS(2)

$THETA
0.15 ;[CL]
8.0  ;[V]
1.0  ;[KA]

$OMEGA (0.07) (0.02) (0.6)
$SIGMA 0.01 (0.001 FIXED)

$DESIGN GROUPSIZE=32 FIMDIAG=1 MAXEVAL=9999 PRINT=20
        DESEL=TIME DESELSTRAT=TSTRAT DESELMIN=TMIN DESELMAX=TMAX

$TABLE ID TIME TSTRAT TMIN TMAX EVID MDV IPRED NOAPPEND NOPRINT FILE=warfarin2c.tab

NM-TRAN MESSAGES
 WARNINGS AND ERRORS (IF ANY) FOR PROBLEM    1
 (WARNING  2) NM-TRAN INFERS THAT THE DATA ARE POPULATION.

1NONLINEAR MIXED EFFECTS MODEL PROGRAM (NONMEM) VERSION 7.5.0
 ORIGINALLY DEVELOPED BY STUART BEAL, LEWIS SHEINER, AND ALISON BOECKMANN
 CURRENT DEVELOPERS ARE ROBERT BAUER, ICON DEVELOPMENT SOLUTIONS,
 AND ALISON BOECKMANN. IMPLEMENTATION, EFFICIENCY, AND STANDARDIZATION
 PERFORMED BY NOUS INFOSYSTEMS.
 PROBLEM NO.:         1
 WARFARIN
 TOT. NO. OF OBS RECS:        5
 TOT. NO. OF INDIVIDUALS:        1
 ONE COMPARTMENT MODEL WITH FIRST-ORDER ABSORPTION (ADVAN2)
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 #TBLN:      1
 #METH: First Order: D-OPTIMALITY
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
 #TERM:
 NO. OF FUNCTION EVALUATIONS USED:       78
0MINIMIZATION SUCCESSFUL

 ETABAR IS THE ARITHMETIC MEAN OF THE ETA-ESTIMATES,
 AND THE P-VALUE IS GIVEN FOR THE NULL HYPOTHESIS THAT THE TRUE MEAN IS 0.

 ETABAR:         0.0000E+00  0.0000E+00  0.0000E+00
 SE:             0.0000E+00  0.0000E+00  0.0000E+00
 N:                       1           1           1

 P VAL.:         1.0000E+00  1.0000E+00  1.0000E+00

 ETASHRINKSD(%)  1.0000E+02  1.0000E+02  1.0000E+02
 ETASHRINKVR(%)  1.0000E+02  1.0000E+02  1.0000E+02
 EBVSHRINKSD(%)  1.8936E+00  7.5390E+00  1.2475E+00
 EBVSHRINKVR(%)  3.7513E+00  1.4510E+01  2.4794E+00
 RELATIVEINF(%)  9.5997E+01  8.5200E+01  9.7428E+01
 EPSSHRINKSD(%)  3.6754E+01  3.6754E+01
 EPSSHRINKVR(%)  6.0000E+01  6.0000E+01

 #TERE:
 Elapsed opt. design time in seconds:     0.05
 Elapsed postprocess time in seconds:     0.01

 ********************                            FIRST ORDER: D-OPTIMALITY                           ********************
 #OBJT:**************                MINIMUM VALUE OF OBJECTIVE FUNCTION: D-OPTIMALITY               ********************
 #OBJV:********************************************      -51.598       **************************************************

 ********************                            FIRST ORDER: D-OPTIMALITY                           ********************
 ********************                             FINAL PARAMETER ESTIMATE                           ********************

 THETA - VECTOR OF FIXED EFFECTS PARAMETERS   *********
         TH 1      TH 2      TH 3
         1.50E-01  8.00E+00  1.00E+00

 OMEGA - COV MATRIX FOR RANDOM EFFECTS - ETAS  ********
         ETA1      ETA2      ETA3
 ETA1
+        7.00E-02
 ETA2
+        0.00E+00  2.00E-02
 ETA3
+        0.00E+00  0.00E+00  6.00E-01

 SIGMA - COV MATRIX FOR RANDOM EFFECTS - EPSILONS  ****
         EPS1      EPS2
 EPS1
+        1.00E-02
 EPS2
+        0.00E+00  1.00E-03

 OMEGA - CORR MATRIX FOR RANDOM EFFECTS - ETAS  *******
         ETA1      ETA2      ETA3
 ETA1
+        2.65E-01
 ETA2
+        0.00E+00  1.41E-01
 ETA3
+        0.00E+00  0.00E+00  7.75E-01

 SIGMA - CORR MATRIX FOR RANDOM EFFECTS - EPSILONS  ***
         EPS1      EPS2
 EPS1
+        1.00E-01
 EPS2
+        0.00E+00  3.16E-02

 ********************                            FIRST ORDER: D-OPTIMALITY                           ********************
 ********************                            STANDARD ERROR OF ESTIMATE                          ********************

 THETA - VECTOR OF FIXED EFFECTS PARAMETERS   *********
         TH 1      TH 2      TH 3
         7.16E-03  2.17E-01  1.39E-01

 OMEGA - COV MATRIX FOR RANDOM EFFECTS - ETAS  ********
         ETA1      ETA2      ETA3
 ETA1
+        1.82E-02
 ETA2
+       .........  5.90E-03
 ETA3
+       ......... .........  1.54E-01

 SIGMA - COV MATRIX FOR RANDOM EFFECTS - EPSILONS  ****
         EPS1      EPS2
 EPS1
+        1.77E-03
 EPS2
+       ......... .........

 OMEGA - CORR MATRIX FOR RANDOM EFFECTS - ETAS  *******
         ETA1      ETA2      ETA3
 ETA1
+        3.44E-02
 ETA2
+       .........  2.08E-02
 ETA3
+       ......... .........  9.93E-02

 SIGMA - CORR MATRIX FOR RANDOM EFFECTS - EPSILONS  ***
         EPS1      EPS2
 EPS1
+        8.84E-03
 EPS2
+       ......... .........

 ********************                            FIRST ORDER: D-OPTIMALITY                           ********************
 ********************                          COVARIANCE MATRIX OF ESTIMATE                         ********************

     TH 1 | TH 1      TH 2 | TH 1      TH 2 | TH 2      TH 3 | TH 1      TH 3 | TH 2      TH 3 | TH 3    OM11 | TH 1
     5.13E-05         7.99E-05         4.71E-02         9.86E-06         9.10E-04         1.93E-02         0.00E+00
   OM11 | TH 2      OM11 | TH 3      OM11 | OM11      OM22 | TH 1      OM22 | TH 2      OM22 | TH 3      OM22 | OM11
     0.00E+00         0.00E+00         3.31E-04         0.00E+00         0.00E+00         0.00E+00        -6.11E-08
   OM22 | OM22      OM33 | TH 1      OM33 | TH 2      OM33 | TH 3      OM33 | OM11      OM33 | OM22      OM33 | OM33
     3.48E-05         0.00E+00         0.00E+00         0.00E+00         7.17E-07         6.70E-07         2.37E-02
   SG11 | TH 1      SG11 | TH 2      SG11 | TH 3      SG11 | OM11      SG11 | OM22      SG11 | OM33      SG11 | SG11
     0.00E+00         0.00E+00         0.00E+00        -6.49E-07        -1.05E-06        -4.37E-06         3.12E-06

 ********************                            FIRST ORDER: D-OPTIMALITY                           ********************
 ********************                          CORRELATION MATRIX OF ESTIMATE                        ********************

     TH 1 | TH 1      TH 2 | TH 1      TH 2 | TH 2      TH 3 | TH 1      TH 3 | TH 2      TH 3 | TH 3    OM11 | TH 1
     7.16E-03         5.14E-02         2.17E-01         9.92E-03         3.02E-02         1.39E-01         0.00E+00
   OM11 | TH 2      OM11 | TH 3      OM11 | OM11      OM22 | TH 1      OM22 | TH 2      OM22 | TH 3      OM22 | OM11
     0.00E+00         0.00E+00         1.82E-02         0.00E+00         0.00E+00         0.00E+00        -5.70E-04
   OM22 | OM22      OM33 | TH 1      OM33 | TH 2      OM33 | TH 3      OM33 | OM11      OM33 | OM22      OM33 | OM33
     5.90E-03         0.00E+00         0.00E+00         0.00E+00         2.56E-04         7.39E-04         1.54E-01
   SG11 | TH 1      SG11 | TH 2      SG11 | TH 3      SG11 | OM11      SG11 | OM22      SG11 | OM33      SG11 | SG11
     0.00E+00         0.00E+00         0.00E+00        -2.02E-02        -1.01E-01        -1.61E-02         1.77E-03
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 Elapsed finaloutput time in seconds:     0.05
 #CPUT: Total CPU Time in Seconds,        0.219
